f(x) := (1 + 1/(x^2 + 2))^cos(x)
x0 := 1
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f1(x) := d/dx(f(x))
f1p1(x, h) := (f(x + h) - f(x))/h
E11(x, h) := |(f1p1(x, h) - f1(x))/f1(x)|
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f1p2(x, h) := (f(x + h) - f(x - h))/(2*h)
E12(x, h) := |(f1p2(x, h) - f1(x))/f1(x)|
k := □, □ .. □  # error: Пустой местозаполнитель.
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f2(x) := d^2/dx^2(f(x))
f2p(x, h) := (f(x + h) - 2*f(x) + f(x - h))/h^2
E2(x, h) := |(f2p(x, h) - f2(x))/f2(x)|
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f3(x) := d^3/dx^3(f(x))
f3p(x, h) := (f(x + 2*h) - 3*f(x + h) + 3*f(x) - f(x - h))/h^3
E3(x, h) := |(f3p(x, h) - f3(x))/f3(x)|
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f4(x) := d^4/dx^4(f(x))
f4p(x, h) := ((f(x + 3*h) - 4*f(x + 2*h) + 6*f(x + h)) - 4*f(x) + f(x - h))/h^4
E4(x, h) := |(f4p(x, h) - f4(x))/f4(x)|
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